# Semster projekt motor
ω_Rot == RPM/(60/(2*π)) solve, RPM → 30*ω_Rot/π
R_a := 1.27
E_a := 12
K_b := 0.36634
K_t := K_b
NoLoadCurrent := 0.223
NoLoadSpeed := 310
D_m := D_m*NoLoadSpeed == K_t*NoLoadCurrent solve, D_m → 0.000263528451613
K_t/(R_a*J_m)/(s*(s + 1/J_m*(D_m + K_t*K_b/R_a))) float, 3 → 0.288/(J_m*s*(s + 0.106/J_m))
τ := 0.00993
J_m := 1/τ == 1/J_m*(D_m + K_t*K_b/R_a) solve, J_m → 0.0010519519606
G := K_t/(R_a*J_m)/(s + 1/J_m*(D_m + K_t*K_b/R_a)) float, 3 → 274.0/(s + 101.0)
60/(2*π)*limit(G*12, s → 0) → 310.872150229
E_a := 12
RatedRPM := 60/(2*π)*rpm*limit(G*E_a, s → 0) → 310.872150229*rpm
clear(K_b)
E_a := 1.972
I_a := 0.1632
ω_Rot := 46/(60/(2*π)) = 4.81711
E_a == R_a*I_a + K_b*ω_Rot solve, K_b → 0.366347553459
Torgue := 35 kg*cm
Hjul := 75 mm/2
M := 5/2
Force := Torgue/Hjul = 9.33333 kg
mprm := Hjul*2*π*RatedRPM = 7.67046 m/s
Acceleration := Force/M*g = 36.6115 N
(7.67 m/s)*60 s = 460.2 m
KmT := mprm/Acceleration = 0.20951 s/kg
Hjul := 0.038
K_b := 0.36634
G := K_t/(M*R_a*Hjul^2*s*(D_m/(M*Hjul^2*s) + 1)*(K_b*K_t/(M*R_a*Hjul^2*s*(D_m/(M*Hjul^2*s) + 1)) + 1)) simplify → 79.904901084/(s + 29.3453610342)
60/(2*π)*limit(G*12, s → 0) → 312.022986474
